// COMSOL Multiphysics 5.6.0.280 model "linearOptics_waveplate.mph"
// Outline of the model tree

Parameters
  aAngle = 0  // Analyzer azimuth
  retAngle1 = 17*pi/180  // Fast axis, 2nd linear retarder
  wallTkn = 4e-6[m]  // Fiber wall thickness
  wavelength = 500e-9[m]  // wavelength
  fracPolar = 0  // Fraction polar in
  pAngle = 45*pi/180

Variables
  var1 "Variables 1"
    delta = 0.25  // 360/wavelength*0.05*wallTkn*pi/180

Geometry
  geom1 "Geometry 1" (3D, length unit m)
    wp1: WorkPlane | quickz = 1; unite = on
      sq1: Square | base = center
    arr1: Array | input = wp1; size = 5; type = linear; linearsize = 5; displ = {0, 0, 1}
    pt1: Point | p = {, , 5}
    wp2: WorkPlane | quickz = 1; displ = {2, 0}; unite = on
      sq1: Square | base = center
    arr2: Array | input = wp2; size = 2; type = linear; linearsize = 2; displ = {0, 0, 4}
    pt2: Point | p = {0, 0, 5}
    fin: Finalize "Form Union"
  pgeom_gop "Geometry" (1D, length unit m)
    pt1: Point

Physics
  gop: GeometricalOptics on all domains
    dependent variable q = {qx, qy, qz}
    IntensityComputation.IntensityComputation = ComputeIntensity
    MaximumSecondary.MaximumSecondary = 0
    mp1: MediumProperties (default)
    matd1: MaterialDiscontinuity (default)
    op1: RayProperties | lambda0 = wavelength
    relg1: ReleaseGrid "Release from Grid 1"
      x0 = {0, 0, 0}
      L0 = {0, 0, 1}
      InitialPolarizationType = PartiallyPolarized
      InitialPolarization = UserDefined
      P0 = fracPolar
      lambda0min = (660[nm])-sqrt(3)*(100[nm])
      lambda0max = (660[nm])+sqrt(3)*(100[nm])
      numin = (4.54e14[Hz])-sqrt(3)*(1E14[Hz])
      numax = (4.54e14[Hz])+sqrt(3)*(1E14[Hz])
    lpol1: LinearPolarizer on boundaries 1 | Ta = {sin(pAngle), cos(pAngle), 0}
    lpol2: LinearPolarizer on boundaries 4 | Ta = {sin(aAngle), cos(aAngle), 0}
    lwav1: LinearWaveRetarder on boundaries 2 | Fa = {sin(retAngle1), cos(retAngle1), 0}; deltal = delta
    rd1: RayDetector on boundaries 5 | ReleaseFeature = relg1
    lwav2: LinearWaveRetarder (disabled) on boundaries 3 | Fa = {sin(-retAngle1), cos(-retAngle1), 0}; deltal = delta
    lpol3: LinearPolarizer on boundaries 6 | Ta = {sin(pAngle), cos(pAngle), 0}
    lpol4: LinearPolarizer on boundaries 7 | Ta = {sin(aAngle), cos(aAngle), 0}
    rd2: RayDetector on boundaries 7 | ReleaseFeature = relg1
    relg2: ReleaseGrid "Release from Grid 2"
      x0 = {2, 0, 0}
      L0 = {0, 0, 1}
      numin = (4.54e14[Hz])-sqrt(3)*(1E14[Hz])
      numax = (4.54e14[Hz])+sqrt(3)*(1E14[Hz])
      lambda0min = (660[nm])-sqrt(3)*(100[nm])
      lambda0max = (660[nm])+sqrt(3)*(100[nm])
      InitialPolarizationType = PartiallyPolarized
      InitialPolarization = UserDefined
      P0 = fracPolar

Mesh
  mesh1 "Mesh 1" (physics-controlled)

Studies
  std1 "Study 1"
    param3: Parametric "Parametric Sweep 3"
      sweeptype = filled
      pname = {retAngle1, wallTkn, pAngle, aAngle, wavelength, fracPolar}
      plistarr = {15*pi/180, 0, range(0,0.1308996939,6.28318530718), 45*pi/180, "457e-9,525e-9,624e-9", 0.4}
      punit = {, m, , , m, }
      useaccumtable = on
      accumtable = tbl1
    param2: Parametric "Parametric Sweep 2" (disabled)
      sweeptype = filled
      pname = {retAngle1, wallTkn, aAngle, wavelength}
      plistarr = {-14*pi/180, 2e-6, range(0,0.1308996939,6.28318530718), range(4.0e-7,5.0e-8,6.5e-7)}
      punit = {, m, , m}
    rtrac: RayTracing | timestepspec = specifylength; tlist = range(0,0.01,1); llist = range(0,0.1,5.1)

Solver configurations
  sol1 "Solution 1" (study std1)
    v1: Variables "Dependent Variables 1"
    t1: Time "Time-Dependent Solver 1"
      tlist = 0.0 3.33564095198e-10 6.67128190396e-10 1.00069228559e-09 1.33425638079e-09 1.66782047599e-09 2.00138457119e-09 2.33494866639e-09 2.66851276159e-09 3.00207685678e-09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
      rtol = 1.0E-5
      timemethod = genalpha
      estrat = exclude
      tstepsgenalpha = strict
      fc1: FullyCoupled | linsolver = i1; ntolfact = 0.1
      i1: Iterative
        ja1: Jacobi
  sol2 "Parametric Solutions 1" (study std1)

Datasets
  dset1: Solution | solution = sol1
  dset2: Solution | solution = sol2
  ray1: Ray | solution = sol2

Derived values
  ray1: Ray "Ray Evaluation 1" | data = ray1; expr = gop.I; unit = W/m^2; descr = Intensity
  ray2: Ray "Ray Evaluation 2" | data = ray1; table = tbl2; expr = gop.I; unit = W/m^2; descr = Intensity

Tables
  tbl2: Table
    // Ray Evaluation 2
    retAngle1 | wallTkn (m) | pAngle | aAngle | wavelength (m) | t (s) | Intensity, Ray 1 (W/m^2) | Ray 2
    0.261799 | 0 | 0 | 0.785398 | 4.57e-07 | 1.70118e-08 | 354.711 | 350
    0.261799 | 0 | 0 | 0.785398 | 5.25e-07 | 1.70118e-08 | 354.711 | 350
    0.261799 | 0 | 0 | 0.785398 | 6.24e-07 | 1.70118e-08 | 354.711 | 350
    0.261799 | 0 | 0.1309 | 0.785398 | 4.57e-07 | 1.70118e-08 | 438.712 | 436.297
    0.261799 | 0 | 0.1309 | 0.785398 | 5.25e-07 | 1.70118e-08 | 438.712 | 436.297
    0.261799 | 0 | 0.1309 | 0.785398 | 6.24e-07 | 1.70118e-08 | 438.712 | 436.297
    0.261799 | 0 | 0.261799 | 0.785398 | 4.57e-07 | 1.70118e-08 | 504.904 | 504.904
    0.261799 | 0 | 0.261799 | 0.785398 | 5.25e-07 | 1.70118e-08 | 504.904 | 504.904
    0.261799 | 0 | 0.261799 | 0.785398 | 6.24e-07 | 1.70118e-08 | 504.904 | 504.904
    0.261799 | 0 | 0.392699 | 0.785398 | 4.57e-07 | 1.70118e-08 | 545.253 | 547.487
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
Plots
  pg1: PlotGroup3D "No Wave retarder" (disabled) | data = ray1
    rtrj1: RayTrajectories
      col1: Color "Color Expression 1" | expr = gop.I
      filt1: RayTrajectoriesFilter "Filter 1"
  pg3: PlotGroup1D "1D Plot Group 3" (disabled) | data = dset2
    rtp1: Ray1D "Ray 1" | data = ray1; expr = gop.I; dataseries = none
  pg4: PlotGroup1D "1D Plot Group 4" | data = dset2
    rtp1: Ray1D "Ray 1" | data = ray1; expr = gop.I0; dataseries = none
  pg5: PlotGroup1D "1D Plot Group 5" (disabled) | data = dset2
    rtp1: Ray1D "Ray 1" (disabled) | data = ray1; expr = gop.pax; unit = rad; dataseries = none
    rtp2: Ray1D "Ray 2" | data = ray1; expr = gop.pay; unit = rad; dataseries = none

Exports
  data1: Data | data = dset1